// SBML level 3 version 1
// Created with https://github.com/matthiaskoenig/sbmlutils.

model dextromethorphan_intestine(Vgu, Vlumen, Vfeces, dex_lumen, dex, dex_feces)
  // Dextromethorphan (DEX) intestine model
  // Dextromethorphan (DEX) intestine / gut model
  // Orally applied DEX is absorbed via the intestine (see absorption in whole-body model). Within the intestinal wall part of the DEX can be metabolized via CYP3A4 mediated first-pass metabolism (the metabolic product of the reaction MEM is not part of the model), resulting in a reduced bioavailability of DEX.
  // Terms of use
  // The content of this model has been carefully created in a manual research effort. This file has been created by Matthias König using sbmlutils. For questions contact koenigmx@hu-berlin.de. Copyright © 2022 Matthias König.
  // This work is licensed under a Creative Commons Attribution 4.0 International License.
  // Redistribution and use of any part of this model, with or without modification, are permitted provided that the following conditions are met:
  // Redistributions of this SBML file must retain the above copyright notice, this list of conditions and the following disclaimer.
  // Redistributions in a different form must reproduce the above copyright notice, this list of conditions and the following disclaimer in the documentation and/or other materials provided with the distribution.
  // This model is distributed in the hope that it will be useful, but WITHOUT ANY WARRANTY; without even the implied warranty of MERCHANTABILITY or FITNESS FOR A PARTICULAR PURPOSE.
  // model units - substance: mmole, time: min, volume: litre, area: m2, length: metre, extent: mmole

  // Compartments:
  compartment Vmem = NaN; Vmem has m2; Vmem is "plasma membrane";  // 2-D; SBO:0000290 ncit:C13735 FMA:63841 GO:0005886
  compartment Vgu = 1.2825 litre; Vgu is "intestine";  // SBO:0000290 FMA:45615 BTO:0000545 ncit:C12736
  compartment Vlumen = 1.15425 litre; Vlumen is "intestinal lumen (inner part of intestine)";  // SBO:0000290 FMA:14586 UBERON:0018543
  compartment Vfeces = 1 litre;  // SBO:0000290 FMA:64183 ncit:C13234 BTO:0000440

  // Species:
  species dex_lumen in Vlumen = 0; dex_lumen is "dextormetorphan (intestinal volume)";  // SBO:0000247 CHEBI:4470 ncit:C62022 inchikey:MKXZASYAUGDDCJ-NJAFHUGGSA-N
  // appearance via absorption defined in (whole-body model)
  species dex in Vgu = 0; dex is "dextromethorphan (intestine)";  // SBO:0000247 CHEBI:4470 ncit:C62022 inchikey:MKXZASYAUGDDCJ-NJAFHUGGSA-N
  substanceOnly species dex_feces in Vfeces = 0; dex_feces is "dextromethorphan (feces)";  // SBO:0000247 CHEBI:4470 ncit:C62022 inchikey:MKXZASYAUGDDCJ-NJAFHUGGSA-N
  // used for tracking of amounts
  species dexmet in Vgu = 0; dexmet is "dextromethorphan metabolite (intestine)";  // SBO:0000247

  // Parameters:
  F_dex = 0.55 dimensionless; F_dex is "fraction absorbed dextromethorphan";  // SBO:0000002
  Ka_abs_dex = 3.428544 per_hr; Ka_abs_dex is "Ka_abs [1/hr] absorption dextromethorphan";  // SBO:0000002
  // Scaling factor for activity
  DEXCYP3A4_activity = 1 dimensionless;  // SBO:0000559
  // Same isoform in liver and intestine. Value replaced by global value.
  // Vmax(DOR) = 5.6 [3.3-6.8] [nmole/min/mg] Km_dex(DOR) = 286 [231-322] [µM]
  DEXCYP3A4_Vmax = 0.0002 mmole_per_min_l; DEXCYP3A4_Vmax is "DEX CYP3A4 Vmax";  // SBO:0000186
  // Same isoform in liver and intestine. Value replaced by global value. Kerry1994: Km = [632, 929, 977, 742, 677][µM] Yu2001: 232+38 [µM]
  // Km_dex(DOR) = 286 [231-322]
  // Vmax(DOR) = 5.6 [3.3-6.8] [nmole/min/mg]
  DEXCYP3A4_Km = 0.7 mM; DEXCYP3A4_Km is "DEX CYP3A4 Km";  // SBO:0000027
  absorption has mmole_per_min; absorption is "absorption dextromethorphan";

  // Assignment rules:
  absorption := Vgu*Ka_abs_dex/(60 min_per_hr)*dex_lumen;

  // Reactions:
  absorption_dex: dex_lumen => dex; F_dex*absorption; absorption_dex is "absorption dextromethorphan";
  excretion_dex: dex_lumen => dex_feces; (1 - F_dex)*absorption; excretion_dex is "excretion dextromethorphan";
  // CYP3A4 mediated conversion of DEX is responsible for the first-pass metabolism of DEX, dextromethorphan (DEX) -[CYP3A4]-> 3-methoxymorphinan (MEM/MM3).First pass can occur in intestine and liver and both enzymes are modeled via the same parameters (Km, Vmax). CYP3A4 inhibition/activation can be implemented by changing the CYP3A4_activity, e.g., grapefruit juice selectively inhibits only the intestinal CYP3A4.
  DEXCYP3A4: dex => dexmet; DEXCYP3A4_Vmax*DEXCYP3A4_activity*Vgu*dex/(dex + DEXCYP3A4_Km); DEXCYP3A4 is "DEX CYP3A4";  // SBO:0000176

  // Unit definitions:
  unit g_per_mole = gram / mole; g_per_mole is "g/mole";
  unit litre_per_min = litre / (60 second); litre_per_min is "litre/min";
  unit m2 = metre^2; m2 is "meter^2";
  unit mM = 1e-3 mole / litre; mM is "mmole/liter";
  unit mg = 1e-3 gram;
  unit microM = 1e-6 mole / litre; microM is "micromole/liter";
  unit min = 60 second;
  unit min_per_hr = 60 second / (3600 second); min_per_hr is "min/hr";
  unit mmole = 1e-3 mole;
  unit mmole_per_min = 1e-3 mole / (60 second); mmole_per_min is "mmole/min";
  unit mmole_per_min_l = 1e-3 mole / (60 second * litre); mmole_per_min_l is "mmole/min/liter";
  unit per_hr = 1 / (3600 second); per_hr is "1/hr";
  unit per_min = 1 / (60 second); per_min is "1/min";
end
